variable        a loop 4 pad
variable        b equal $a-1
variable        f equal $b*100
variable        t equal 900+$f

log             log$t.lammps

units           metal
boundary        p p p
atom_style      atomic

read_data	licl.data
replicate       2 2 2
mass 		1 6.94
mass		2 35.45

pair_style	deepmd ./licl_compress_0.pb ./licl_compress_1.pb ./licl_compress_2.pb ./licl_compress_3.pb  out_freq 100 out_file model_devi$t.out
pair_coeff  	* *

velocity        all create $t 23456789

fix             1 all npt temp $t $t 0.1 iso 0 0 0.5
timestep        0.001

thermo_style    custom step temp pe ke etotal press density lx ly lz vol
thermo          100

run             1000000
write_data	licl.data$t

clear
next            a
jump            in.licl
